OpenVSP model (file version 5), 4 components.
Geometry view with OpenVSP parameter names; values to 6 digits, angles in degrees, lengths in the model's unit.
Overall bounding box: X_Min=0 X_Len=61 Y_Min=-45 Y_Len=90 Z_Min=-15.477 Z_Len=17.477

Stack "Fuselage stack"
  location (X Y Z) 0 0 0, rotation 0 0 0
  bounding box size 61 4 4
  cross sections:
    n  XDelta  YDelta  ZDelta      shape
    0  0       0       0           rounded rectangle RoundRectXSec_Radius=0.2 RoundedRect_Height=0.75 RoundedRect_Width=0.75
    1  3       0       0           rounded rectangle RoundRectXSec_Radius=0.2 RoundedRect_Height=4 RoundedRect_Width=4
    2  9       0       0           as above
    3  6       0       0           as above
    4  4       0       0.606557    edit curve Width=7.24051 Height=5.98101 AbsoluteFlag=1 SymType=0 linear points (X Y): 0.189904 0, 0.0949519 -0.229894, 0 -0.229894, -0.0949519 -0.229894, -0.189904 0, -0.0949519 0.229894, 0 0.229894, 0.0949519 0.229894, 0.189904 0
    5  22      0       0.00409836  edit curve Width=7.24051 Height=5.98101 AbsoluteFlag=1 SymType=1 linear points (X Y): 0.189904 0, 0.0949519 -0.229894, 0 -0.229894, -0.0949519 -0.229894, -0.189904 0, -0.0949519 0.229894, 0 0.229894, 0.0949519 0.229894, 0.189904 0
    6  8       0       0.00409836  as above
    7  5       0       0           as above
    8  4       0       0           as above

Wing "Wing", child of "Fuselage stack"
  location (X Y Z) 0 0 0, rotation 0 0 0
  symmetric about XZ
  bounding box size 10 90 1.00058
  totals: TotalSpan=90 TotalProjectedSpan=90 TotalChord=10 TotalArea=900 TotalAR=9 MAC=10
  root: chord 10, twist 0, NACA 4-series Camber=0 CamberLoc=0.2 DeltaX=1.2 DeltaY=0.13 ThickChord=0.1
  sections:
    n  Span  Root_Chord  Tip_Chord  Area  Sweep  Sweep_Location  Dihedral  Twist  Twist_Location  tip airfoil
    1  45    10          10         450   0      0               0         0      0.25            NACA 4-digit modified Camber=0 CamberLoc=0.2 DeltaX=1.2 DeltaY=0.13 IdealCl=0 LERadIndx=6 ThickChord=0.1 ThickLoc=0.3

Wing "Vtail", child of "Fuselage stack"
  location (X Y Z) 52 1 0.2, rotation 0 0 0
  symmetric about XZ
  bounding box size 5 38.7701 15.9272
  totals: TotalSpan=48 TotalProjectedSpan=36.7701 TotalChord=5 TotalArea=240 TotalAR=5.63351 MAC=5
  root: chord 5, twist 0, NACA 4-series Camber=0 CamberLoc=0.2 ThickChord=0.1
  sections:
    n  Span  Root_Chord  Tip_Chord  Area  Sweep  Sweep_Location  Dihedral  Twist  Twist_Location  tip airfoil
    1  24    5           5          120   0      0               -40       0      0.25            as above

NGonMesh "MeshGeom_NGon"
  location (X Y Z) 0 0 0, rotation 0 0 0

VSPAERO settings (reference component "Wing"): Sref=900 bref=90 cref=10 Xcg=1.2 Ycg=0 Zcg=0 AlphaStart=0 AlphaEnd=10 AlphaNpts=3 BetaStart=0 BetaEnd=0 BetaNpts=1 MachStart=0 MachEnd=0 MachNpts=1 ReCref=1e+07 Vinf=100 Rho=0.002377
