OpenVSP model (file version 5), 6 components.
Geometry view with OpenVSP parameter names; values to 6 digits, angles in degrees, lengths in the model's unit.
Overall bounding box: X_Min=-0.265165 X_Len=62.4301 Y_Min=-46 Y_Len=92 Z_Min=-15.477 Z_Len=17.477

Stack "Fuselage stack"
  location (X Y Z) 0 0 0, rotation 0 0 0
  bounding box size 62.2652 4 4
  cross sections:
    n  XDelta  YDelta  ZDelta      shape
    0  0       0       0           rounded rectangle RoundRectXSec_Radius=0.2 RoundedRect_Height=0.75 RoundedRect_Width=0.75
    1  3       0       0           rounded rectangle RoundRectXSec_Radius=0.2 RoundedRect_Height=4 RoundedRect_Width=4
    2  9       0       0           as above
    3  5       0       0           as above
    4  6       0       0.606557    edit curve Width=7.24051 Height=5.98101 AbsoluteFlag=1 SymType=0 linear points (X Y): 0.189904 0, 0.0949519 -0.229894, 0 -0.229894, -0.0949519 -0.229894, -0.189904 0, -0.0949519 0.229894, 0 0.229894, 0.0949519 0.229894, 0.189904 0
    5  21      0       0.00409836  edit curve Width=7.24051 Height=5.98101 AbsoluteFlag=1 SymType=1 linear points (X Y): 0.189904 0, 0.0949519 -0.229894, 0 -0.229894, -0.0949519 -0.229894, -0.189904 0, -0.0949519 0.229894, 0 0.229894, 0.0949519 0.229894, 0.189904 0
    6  8       0       0.00409836  as above
    7  5       0       0           as above
    8  4       0       0           as above
    9  1       0       0           circle Circle_Diameter=2.38403

Wing "Wing", child of "Fuselage stack"
  location (X Y Z) 0 1 0, rotation 0 0 0
  symmetric about XZ
  bounding box size 10 92 1.00058
  totals: TotalSpan=90 TotalProjectedSpan=90 TotalChord=10 TotalArea=900 TotalAR=9 MAC=10
  root: chord 10, twist 0, NACA 4-series Camber=0 CamberLoc=0.2 DeltaX=1.2 DeltaY=0.13 ThickChord=0.1
  sections:
    n  Span  Root_Chord  Tip_Chord  Area  Sweep  Sweep_Location  Dihedral  Twist  Twist_Location  tip airfoil
    1  45    10          10         450   0      0               0         0      0.25            NACA 4-digit modified Camber=0 CamberLoc=0.2 DeltaX=1.2 DeltaY=0.13 IdealCl=0 LERadIndx=6 ThickChord=0.1 ThickLoc=0.3

Wing "Vtail", child of "Fuselage stack"
  location (X Y Z) 52 1 0.2, rotation 0 0 0
  symmetric about XZ
  bounding box size 5 38.7701 15.9272
  totals: TotalSpan=48 TotalProjectedSpan=36.7701 TotalChord=5 TotalArea=240 TotalAR=5.63351 MAC=5
  root: chord 5, twist 0, NACA 4-series Camber=0 CamberLoc=0.2 ThickChord=0.1
  sections:
    n  Span  Root_Chord  Tip_Chord  Area  Sweep  Sweep_Location  Dihedral  Twist  Twist_Location  tip airfoil
    1  24    5           5          120   0      0               -40       0      0.25            as above

Custom "Disk", child of "Fuselage stack"
  location (X Y Z) 62 0 0.606, rotation 0 0 0
  bounding box size 0 2.4 2.4
  Design: Diameter=2.4
  custom script Disk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

Propeller "Prop", child of "Disk"
  location (X Y Z) 62 0 0.606, rotation 0 0 0; relative location 0 0 0, rotation 0 0 0
  bounding box size 0.340117 13.0234 1.30063
  Design: Diameter=13 NumBlade=2 Beta34=0 UseBeta34Flag=1 Feather=-20 Rotate=0 Precone=0 ReverseFlag=0 FoldAngle=0 PropMode=0 AF=151.834 CLi=0.539661 Chord=0.176696 Solidity=0.112488 ConstructXoC=0.5 FeatherAxisXoC=0.5 FeatherOffsetXoC=0
  cross sections:
    n  RadiusFrac  shape
    0  0.16        ellipse Ellipse_Height=0.26 Ellipse_Width=0.52
    1  0.4         NACA 16-series Chord=1.11687 IdealCl=0.7 ThickChord=0.144074
    2  1           NACA 16-series Chord=0.845 IdealCl=0.2 ThickChord=0.03
  Chord along r/R (cubic Bezier): 0.16: 0.08, 0.306667: 0.15, 0.453333: 0.2, 0.6: 0.2, 0.716667: 0.2, 0.833333: 0.2, 0.95: 0.2, 0.966667: 0.2, 0.983333: 0.2, 1: 0.13
  Twist along r/R (PCHIP): 0.16: 46.75, 0.75: 20, 1: 13
  Thick along r/R (cubic Bezier): 0.16: 0.5, 0.206667: 0.3, 0.253333: 0.225, 0.3: 0.2, 0.4: 0.125, 0.5: 0.115, 0.6: 0.1, 0.733333: 0.075, 0.866667: 0.055, 1: 0.03
  CLI along r/R (cubic Bezier): 0.16: 0, 0.24: 0.7, 0.32: 0.7, 0.4: 0.7, 0.466667: 0.7, 0.533333: 0.7, 0.6: 0.7, 0.733333: 0.7, 0.866667: 0.7, 1: 0.2

NGonMesh "MeshGeom_NGon"
  location (X Y Z) 0 0 0, rotation 0 0 0

VSPAERO settings (reference component "Wing"): Sref=900 bref=90 cref=10 Xcg=1.2 Ycg=0 Zcg=0 AlphaStart=0 AlphaEnd=10 AlphaNpts=3 BetaStart=0 BetaEnd=0 BetaNpts=1 MachStart=0 MachEnd=0 MachNpts=1 ReCref=1e+07 Vinf=100 Rho=0.002377
